// SBML level 3 version 1

model Kholodenko_tosbml()
  // This is the oscillatory MAPK model from Kholodenko 2000 Eur J. Biochem 267:1583-1588 The original model is formulated in terms of idealized Michaelis-Menten enzymes and the enzyme-substrate complex concentrations are therefore assumed negligible. The current implementation of the model uses explicit enzyme reactions involving substrates and is therefore an approximation to the Kholodenko model. The approximation is greatly improved if the enzyme is flagged as Available which is an option in Kinetikit. This flag means that the enzyme protein concentration is not reduced even when it is involved in a complex. However, the substrate protein continues to participate in enzyme-substrate complexes and its concentration is therefore affected. Overall, this model works almost the same as the Kholodenko model but the peak MAPK-PP amplitudes are a little reduced and the period of oscillations is about 10% longer. If the enzymes are not flagged as Available then the oscillations commence only when the Km for enzyme 1 is set to 0.1 uM.
  // model units - substance: substance, time: time, volume: volume, area: area, length: length, extent: substance

  // Compartments:
  compartment kinetics_464_0_ = 1.666667e-18 volume;

  // Species:
  // The total concn. of MAPK is 300nM from Kholodenko, 2000.
  species MAPK_472_0_ in kinetics_464_0_ = 0.0003;
  // The total concn. of MKKK is 100nM from Kholodenko, 2000
  species MKKK_474_0_ in kinetics_464_0_ = 0.0001;
  // The total concn. of MKK is 300nM from Kholodenko,2000
  species MKK_476_0_ in kinetics_464_0_ = 0.0003;
  // This is the intermediate enzyme which catalyses the dephosphorylation of MKKK-P to MKKK. The concentration is set to 1 nM based on from Kholodenko, 2000
  species int1_478_0_ in kinetics_464_0_ = 1e-6;
  // This is the phosphorylated form of MKKK which converts MKK to MKK-P and then to MKK-PP from Kholodenko, 2000.
  species MKKK_dash_P_482_0_ in kinetics_464_0_ = 0;
  // This intermediate enzyme catalyses the dephosphorylation of MKK-P to MKK. The concentration is 1nM from Kholodenko, 2000
  species int3_488_0_ in kinetics_464_0_ = 1e-6;
  // This catalyses the conversion of MAPK-P to MAPK. The concenration is 1nM. from Kholodenko, 2000
  species int5_492_0_ in kinetics_464_0_ = 1e-6;
  // This is the single phoshorylated form of MKK. from Kholodenko, 2000.
  species MKK_dash_P_496_0_ in kinetics_464_0_ = 0;
  // This is the single phopshorylated form of MAPK from Kholodenko, 2000.
  species MAPK_dash_P_498_0_ in kinetics_464_0_ = 0;
  // This intermediate enzyme which catalyses the dephosphorylation of MKK-PP to MKK-P. The concentration is 1nM. from Kholodenko, 2000
  species int2_500_0_ in kinetics_464_0_ = 1e-6;
  // This intermediate enzyme catalyses the dephosphorylation of MAPK-PP to MAPK-P. The concentration is 1nM. from Kholodenko, 2000
  species int4_504_0_ in kinetics_464_0_ = 1e-6;
  // The concn. of Ras-MKKKK* is set to 1 nM implicitly from Kholodenko, 2000
  species Ras_dash_MKKKK_508_0_ in kinetics_464_0_ = 1e-6;
  // This is the inactive form of Ras-MKKK. Based on the reaction scheme from Kholodenko 2000, this is equivalent to a binding of the MAPK-PP to the Ras. The amount of Ras in the model is small enough that negligible amounts of MAPK are involved in this reaction. So it is a fair approximation to the negative feedback mechanism from Kholodenko, 2000.
  species inactiveRas_dash_MKKK_512_0_ in kinetics_464_0_ = 0;
  // This is the double phosphorylated and active form of MKK from Kholodenko, 2000
  species MKK_dash_PP_516_0_ in kinetics_464_0_ = 0;
  // This is the double phosphorylated and active form of MAPK. from Kholodenko, 2000.
  species MAPK_dash_PP_522_0_ in kinetics_464_0_ = 0;

  // Reactions:
  // kinetics_464_0_ * Neg_feedback_514_0__Kf * MAPK_dash_PP_522_0_*Ras_dash_MKKKK_508_0_-kinetics_464_0_ * Neg_feedback_514_0__Kb * inactiveRas_dash_MKKK_512_0_
  // From Kholodenko, 2000 Eur J Biochem 267 the Kd is 9 nM. We use a rather fast Kf of 1/sec/uM so that equilibrium is maintained.
  Neg_feedback_514_0_: MAPK_dash_PP_522_0_ + Ras_dash_MKKKK_508_0_ -> inactiveRas_dash_MKKK_512_0_; kinetics_464_0_*Neg_feedback_514_0__Kf*MAPK_dash_PP_522_0_*Ras_dash_MKKKK_508_0_ - kinetics_464_0_*Neg_feedback_514_0__Kb*inactiveRas_dash_MKKK_512_0_;
    Neg_feedback_514_0__Kf = 1000 litre_per_mmole_per_second; Neg_feedback_514_0__Kb = 0.009 per_second;
  // kinetics_464_0_ * ( kcat * MKKK_dash_P_482_0_ * int1_478_0_ / ( Km + MKKK_dash_P_482_0_))
  // Km is 8nM and Vmax is 0.25nM.s-1 from Kholodenko, 2000.
  _2_480_0_: MKKK_dash_P_482_0_ -> MKKK_474_0_; kinetics_464_0_*(_2_480_0__kcat*MKKK_dash_P_482_0_*int1_478_0_/(_2_480_0__Km + MKKK_dash_P_482_0_));  // modifiers: int1_478_0_
    _2_480_0__Km = 8e-6 mmole_per_litre; _2_480_0__kcat = 0.25 per_second;
  // kinetics_464_0_ * ( kcat * MKK_476_0_ * MKKK_dash_P_482_0_ / ( Km + MKK_476_0_))
  // Km is 15 nM and Vmax is 0.025s-1 from Kholodenko, 2000
  _3_484_0_: MKK_476_0_ -> MKK_dash_P_496_0_; kinetics_464_0_*(_3_484_0__kcat*MKK_476_0_*MKKK_dash_P_482_0_/(_3_484_0__Km + MKK_476_0_));  // modifiers: MKKK_dash_P_482_0_
    _3_484_0__Km = 1.500006e-5 mmole_per_litre; _3_484_0__kcat = 0.025 per_second;
  // kinetics_464_0_ * ( kcat * MKK_dash_P_496_0_ * MKKK_dash_P_482_0_ / ( Km + MKK_dash_P_496_0_))
  // Km is 15nM and Vmax is 0.025s-1 from Kholodenko, 2000.
  _4_486_0_: MKK_dash_P_496_0_ -> MKK_dash_PP_516_0_; kinetics_464_0_*(_4_486_0__kcat*MKK_dash_P_496_0_*MKKK_dash_P_482_0_/(_4_486_0__Km + MKK_dash_P_496_0_));  // modifiers: MKKK_dash_P_482_0_
    _4_486_0__Km = 1.500006e-5 mmole_per_litre; _4_486_0__kcat = 0.025 per_second;
  // kinetics_464_0_ * ( kcat * MKK_dash_P_496_0_ * int3_488_0_ / ( Km + MKK_dash_P_496_0_))
  // The Km is 15nM and the Vmax is 0.75nM.s-1 from Kholodenko 2000.
  _6_490_0_: MKK_dash_P_496_0_ -> MKK_476_0_; kinetics_464_0_*(_6_490_0__kcat*MKK_dash_P_496_0_*int3_488_0_/(_6_490_0__Km + MKK_dash_P_496_0_));  // modifiers: int3_488_0_
    _6_490_0__Km = 1.5e-5 mmole_per_litre; _6_490_0__kcat = 0.75 per_second;
  // kinetics_464_0_ * ( kcat * MAPK_dash_P_498_0_ * int5_492_0_ / ( Km + MAPK_dash_P_498_0_))
  // The Km is 15nM and Vmax is 0.5nM.s-1 from Kholodenko, 2000
  _10_494_0_: MAPK_dash_P_498_0_ -> MAPK_472_0_; kinetics_464_0_*(_10_494_0__kcat*MAPK_dash_P_498_0_*int5_492_0_/(_10_494_0__Km + MAPK_dash_P_498_0_));  // modifiers: int5_492_0_
    _10_494_0__Km = 1.49997e-5 mmole_per_litre; _10_494_0__kcat = 0.5 per_second;
  // kinetics_464_0_ * ( kcat * MKK_dash_PP_516_0_ * int2_500_0_ / ( Km + MKK_dash_PP_516_0_))
  // The Km is 15nM and Vmax is 0.75nM.s-1 from Kholodenko, 2000
  _5_502_0_: MKK_dash_PP_516_0_ -> MKK_dash_P_496_0_; kinetics_464_0_*(_5_502_0__kcat*MKK_dash_PP_516_0_*int2_500_0_/(_5_502_0__Km + MKK_dash_PP_516_0_));  // modifiers: int2_500_0_
    _5_502_0__Km = 1.5e-5 mmole_per_litre; _5_502_0__kcat = 0.75 per_second;
  // kinetics_464_0_ * ( kcat * MAPK_dash_PP_522_0_ * int4_504_0_ / ( Km + MAPK_dash_PP_522_0_))
  // The Km is 15nM and Vmax is 0.5nM.s-1 from Kholodenko, 2000
  _9_506_0_: MAPK_dash_PP_522_0_ -> MAPK_dash_P_498_0_; kinetics_464_0_*(_9_506_0__kcat*MAPK_dash_PP_522_0_*int4_504_0_/(_9_506_0__Km + MAPK_dash_PP_522_0_));  // modifiers: int4_504_0_
    _9_506_0__Km = 1.49997e-5 mmole_per_litre; _9_506_0__kcat = 0.5 per_second;
  // kinetics_464_0_ * ( kcat * MKKK_474_0_ * Ras_dash_MKKKK_508_0_ / ( Km + MKKK_474_0_))
  // The Km is 10nM and Vmax is 2.5nM sec^-1. We assume that there is 1 nM of the Ras-MKKKK. From Kholodenko, 2000. If the enzymes are not flagged as Available, then this Km should be set to 0.1 to obtain oscillations.
  _1_510_0_: MKKK_474_0_ -> MKKK_dash_P_482_0_; kinetics_464_0_*(_1_510_0__kcat*MKKK_474_0_*Ras_dash_MKKKK_508_0_/(_1_510_0__Km + MKKK_474_0_));  // modifiers: Ras_dash_MKKKK_508_0_
    _1_510_0__Km = 1e-5 mmole_per_litre; _1_510_0__kcat = 2.5 per_second;
  // kinetics_464_0_ * ( kcat * MAPK_472_0_ * MKK_dash_PP_516_0_ / ( Km + MAPK_472_0_))
  // The Km is 15nM which is 0.015uM Vmax is 0.025s-1 from Kholodenko, 2000.
  _7_518_0_: MAPK_472_0_ -> MAPK_dash_P_498_0_; kinetics_464_0_*(_7_518_0__kcat*MAPK_472_0_*MKK_dash_PP_516_0_/(_7_518_0__Km + MAPK_472_0_));  // modifiers: MKK_dash_PP_516_0_
    _7_518_0__Km = 1.500006e-5 mmole_per_litre; _7_518_0__kcat = 0.025 per_second;
  // kinetics_464_0_ * ( kcat * MAPK_dash_P_498_0_ * MKK_dash_PP_516_0_ / ( Km + MAPK_dash_P_498_0_))
  // The Km is 15nM which is 0.015uM and Vmax is 0.025s-1 from Kholodenko, 2000
  _8_520_0_: MAPK_dash_P_498_0_ -> MAPK_dash_PP_522_0_; kinetics_464_0_*(_8_520_0__kcat*MAPK_dash_P_498_0_*MKK_dash_PP_516_0_/(_8_520_0__Km + MAPK_dash_P_498_0_));  // modifiers: MKK_dash_PP_516_0_
    _8_520_0__Km = 1.500006e-5 mmole_per_litre; _8_520_0__kcat = 0.025 per_second;

  // Unit definitions:
  unit volume = litre;
  unit substance = 1e-3 mole;
  unit length = metre;
  unit area = metre^2;
  unit time = second;
  unit litre_per_mmole_per_second = litre / (1e-3 mole * second);
  unit per_second = 1 / second;
  unit mmole_per_litre = 1e-3 mole / litre;
end
