// SBML level 3 version 1

model NN_mapk15()
  // Compartment
  // model units - substance: substance, time: time, volume: volume, area: area, length: length, extent: substance

  // Compartments:
  compartment PSD_625_0_ = 1e-17 volume;
  compartment DEND_627_0_ = 1e-15 volume;
  compartment SPINE_629_0_ = 9e-17 volume;

  // Species:
  species Ca_473_0_ in PSD_625_0_ = 0.0001;
  species $Ca_input_475_0_ in PSD_625_0_ = 8e-5;
  // There is a LOT of this in the cell: upto 1% of total protein mass. (Alberts et al) Say 25 uM. Meyer et al Science 256 1199-1202 1992 refer to studies saying it is comparable to CaMK levels.
  species CaM_481_0_ in PSD_625_0_ = 0.04;
  species CaM_Ca3_485_0_ in PSD_625_0_ = 0;
  // This is the intermediate where the TR2 end (the high-affinity end) has bound the Ca but the TR1 end has not.
  species CaM_Ca2_489_0_ in PSD_625_0_ = 0;
  // This is the intermediate where the TR2 end (the high-affinity end) has bound the Ca but the TR1 end has not.
  species CaM_Ca_495_0_ in PSD_625_0_ = 0;
  species CaM_Ca4_497_0_ in PSD_625_0_ = 0;
  species phosphatase_503_0_ in DEND_627_0_ = 0.0004;
  species P_cplx_506_0_ in DEND_627_0_ = 0;
  species P_MAPK_508_0_ in DEND_627_0_ = 0;
  species PLA2_cplx_511_0_ in DEND_627_0_ = 0;
  species activate_phosphatase_cplx_514_0_ in DEND_627_0_ = 0;
  species phosph_chan_cplx_517_0_ in DEND_627_0_ = 0;
  species MAPK_519_0_ in DEND_627_0_ = 0.002000033;
  species AA_523_0_ in DEND_627_0_ = 0;
  species act_PKC_525_0_ in DEND_627_0_ = 0;
  species MAPKK_cplx_528_0_ in DEND_627_0_ = 0;
  species PKC_530_0_ in DEND_627_0_ = 0.001;
  species $APC_532_0_ in DEND_627_0_ = 0.001;
  species Raf_536_0_ in DEND_627_0_ = 0.0014;
  species act_Raf_538_0_ in DEND_627_0_ = 0;
  species MAPKKK_cplx_541_0_ in DEND_627_0_ = 0;
  species Ca_545_0_ in DEND_627_0_ = 8e-5;
  species $Ca_input_547_0_ in DEND_627_0_ = 8e-5;
  species inact_phosphatase_553_0_ in DEND_627_0_ = 0.001;
  species reg_phosphatase_555_0_ in DEND_627_0_ = 0;
  species P_cplx_558_0_ in DEND_627_0_ = 0;
  // There is a LOT of this in the cell: upto 1% of total protein mass. (Alberts et al) Say 25 uM. Meyer et al Science 256 1199-1202 1992 refer to studies saying it is comparable to CaMK levels.
  species CaM_562_0_ in DEND_627_0_ = 0.002;
  species CaM_Ca3_566_0_ in DEND_627_0_ = 0;
  // This is the intermediate where the TR2 end (the high-affinity end) has bound the Ca but the TR1 end has not.
  species CaM_Ca2_570_0_ in DEND_627_0_ = 0;
  // This is the intermediate where the TR2 end (the high-affinity end) has bound the Ca but the TR1 end has not.
  species CaM_Ca_576_0_ in DEND_627_0_ = 0;
  species CaM_Ca4_578_0_ in DEND_627_0_ = 0;
  species CaM_xchange_582_0_ in DEND_627_0_ = 0;
  // This is the unphosphorylated K_A channel, which has the full channel conductance.
  species channel_584_0_ in DEND_627_0_ = 0.001;
  species channel_p_586_0_ in DEND_627_0_ = 0;
  species Ca_590_0_ in SPINE_629_0_ = 0.0001111111;
  // There is a LOT of this in the cell: upto 1% of total protein mass. (Alberts et al) Say 25 uM. Meyer et al Science 256 1199-1202 1992 refer to studies saying it is comparable to CaMK levels.
  species CaM_594_0_ in SPINE_629_0_ = 0.04;
  species CaM_Ca3_598_0_ in SPINE_629_0_ = 0;
  // This is the intermediate where the TR2 end (the high-affinity end) has bound the Ca but the TR1 end has not.
  species CaM_Ca2_602_0_ in SPINE_629_0_ = 0;
  // This is the intermediate where the TR2 end (the high-affinity end) has bound the Ca but the TR1 end has not.
  species CaM_Ca_608_0_ in SPINE_629_0_ = 0;
  species CaM_Ca4_610_0_ in SPINE_629_0_ = 0;
  species CaM_xchange_614_0_ in SPINE_629_0_ = 0;

  // Reactions:
  // PSD_625_0_ * Ca_stim_477_0__Kf * Ca_input_475_0_-PSD_625_0_ * Ca_stim_477_0__Kb * Ca_473_0_
  Ca_stim_477_0_: $Ca_input_475_0_ -> Ca_473_0_; PSD_625_0_*Ca_stim_477_0__Kf*Ca_input_475_0_ - PSD_625_0_*Ca_stim_477_0__Kb*Ca_473_0_;
    Ca_stim_477_0__Kf = 500 per_second; Ca_stim_477_0__Kb = 10 per_second;
  // PSD_625_0_ * CaM_Ca3_bind_Ca_483_0__Kf * Ca_473_0_*CaM_Ca3_485_0_-PSD_625_0_ * CaM_Ca3_bind_Ca_483_0__Kb * CaM_Ca4_497_0_
  // Use K3 = 21.5 uM here from Stemmer and Klee table 3. kb/kf =21.5 * 6e5 so kf = 7.75e-7, kb = 10 24 Sep 2015 This is a bit too low affinity. Changing to match K2 at Kd = 2.8.
  CaM_Ca3_bind_Ca_483_0_: Ca_473_0_ + CaM_Ca3_485_0_ -> CaM_Ca4_497_0_; PSD_625_0_*CaM_Ca3_bind_Ca_483_0__Kf*Ca_473_0_*CaM_Ca3_485_0_ - PSD_625_0_*CaM_Ca3_bind_Ca_483_0__Kb*CaM_Ca4_497_0_;
    CaM_Ca3_bind_Ca_483_0__Kf = 1800 litre_per_mmole_per_second; CaM_Ca3_bind_Ca_483_0__Kb = 10 per_second;
  // PSD_625_0_ * CaM_bind_Ca_487_0__Kf * Ca_473_0_*CaM_481_0_-PSD_625_0_ * CaM_bind_Ca_487_0__Kb * CaM_Ca_495_0_
  // Lets use the fast rate consts here. Since the rates are so different, I am not sure whether the order is relevant. These correspond to the TR2C fragment. We use the Martin et al rates here, plus the Drabicowski binding consts. All are scaled by 3X to cell temp. kf = 2e-10 kb = 72 Stemmer _and Klee: K1=.9, K2=1.1. Assume 1.0uM for both. kb/kf=3.6e11. If kb=72, kf = 2e-10 (Exactly the same !) 19 May 2006. Splitting the old CaM-TR2-bind-Ca reaction into two steps, each binding 1 Ca. This improves numerical stability and is conceptually better too. Overall rates are the same, so each kf and kb is the square root of the earlier ones. So kf = 1.125e-4, kb = 8.4853
  CaM_bind_Ca_487_0_: Ca_473_0_ + CaM_481_0_ -> CaM_Ca_495_0_; PSD_625_0_*CaM_bind_Ca_487_0__Kf*Ca_473_0_*CaM_481_0_ - PSD_625_0_*CaM_bind_Ca_487_0__Kb*CaM_Ca_495_0_;
    CaM_bind_Ca_487_0__Kf = 8484.6 litre_per_mmole_per_second; CaM_bind_Ca_487_0__Kb = 8.4853 per_second;
  // PSD_625_0_ * CaM_Ca2_bind_Ca_491_0__Kf * Ca_473_0_*CaM_Ca2_489_0_-PSD_625_0_ * CaM_Ca2_bind_Ca_491_0__Kb * CaM_Ca3_485_0_
  // K3 = 21.5, K4 = 2.8. Assuming that the K4 step happens first, we get kb/kf = 2.8 uM = 1.68e6 so kf =6e-6 assuming kb = 10
  CaM_Ca2_bind_Ca_491_0_: Ca_473_0_ + CaM_Ca2_489_0_ -> CaM_Ca3_485_0_; PSD_625_0_*CaM_Ca2_bind_Ca_491_0__Kf*Ca_473_0_*CaM_Ca2_489_0_ - PSD_625_0_*CaM_Ca2_bind_Ca_491_0__Kb*CaM_Ca3_485_0_;
    CaM_Ca2_bind_Ca_491_0__Kf = 3600.06 litre_per_mmole_per_second; CaM_Ca2_bind_Ca_491_0__Kb = 10 per_second;
  // PSD_625_0_ * CaM_Ca_bind_Ca_493_0__Kf * Ca_473_0_*CaM_Ca_495_0_-PSD_625_0_ * CaM_Ca_bind_Ca_493_0__Kb * CaM_Ca2_489_0_
  // Lets use the fast rate consts here. Since the rates are so different, I am not sure whether the order is relevant. These correspond to the TR2C fragment. We use the Martin et al rates here, plus the Drabicowski binding consts. All are scaled by 3X to cell temp. kf = 2e-10 kb = 72 Stemmer _and Klee: K1=.9, K2=1.1. Assume 1.0uM for both. kb/kf=3.6e11. If kb=72, kf = 2e-10 (Exactly the same !) 19 May 2006. Splitting the old CaM-TR2-bind-Ca reaction into two steps, each binding 1 Ca. This improves numerical stability and is conceptually better too. Overall rates are the same, so each kf and kb is the square root of the earlier ones. So kf = 1.125e-4, kb = 8.4853
  CaM_Ca_bind_Ca_493_0_: Ca_473_0_ + CaM_Ca_495_0_ -> CaM_Ca2_489_0_; PSD_625_0_*CaM_Ca_bind_Ca_493_0__Kf*Ca_473_0_*CaM_Ca_495_0_ - PSD_625_0_*CaM_Ca_bind_Ca_493_0__Kb*CaM_Ca2_489_0_;
    CaM_Ca_bind_Ca_493_0__Kf = 8484.6 litre_per_mmole_per_second; CaM_Ca_bind_Ca_493_0__Kb = 8.4853 per_second;
  // DEND_627_0_ * degrade_Y_501_0__Kf * AA_523_0_-DEND_627_0_ * degrade_Y_501_0__Kb * APC_532_0_
  degrade_Y_501_0_: AA_523_0_ -> $APC_532_0_; DEND_627_0_*degrade_Y_501_0__Kf*AA_523_0_ - DEND_627_0_*degrade_Y_501_0__Kb*APC_532_0_;
    degrade_Y_501_0__Kf = 0.4 per_second; degrade_Y_501_0__Kb = 0.01 per_second;
  // DEND_627_0_ * Ca_activate_Raf_521_0__Kf * Raf_536_0_*Ca_545_0_^2-DEND_627_0_ * Ca_activate_Raf_521_0__Kb * act_Raf_538_0_
  Ca_activate_Raf_521_0_: Raf_536_0_ + 2 Ca_545_0_ -> act_Raf_538_0_; DEND_627_0_*Ca_activate_Raf_521_0__Kf*Raf_536_0_*Ca_545_0_^2 - DEND_627_0_*Ca_activate_Raf_521_0__Kb*act_Raf_538_0_;
    Ca_activate_Raf_521_0__Kf = 11999880 sq_litre_per_mmole_sq_per_second; Ca_activate_Raf_521_0__Kb = 4 per_second;
  // DEND_627_0_ * dephosph_534_0__Kf * channel_p_586_0_
  dephosph_534_0_: channel_p_586_0_ => channel_584_0_; DEND_627_0_*dephosph_534_0__Kf*channel_p_586_0_;
    dephosph_534_0__Kf = 6 per_second;
  // DEND_627_0_ * activate_PKC_543_0__Kf * AA_523_0_^2*PKC_530_0_-DEND_627_0_ * activate_PKC_543_0__Kb * act_PKC_525_0_
  activate_PKC_543_0_: 2 AA_523_0_ + PKC_530_0_ -> act_PKC_525_0_; DEND_627_0_*activate_PKC_543_0__Kf*AA_523_0_^2*PKC_530_0_ - DEND_627_0_*activate_PKC_543_0__Kb*act_PKC_525_0_;
    activate_PKC_543_0__Kf = 1000044 sq_litre_per_mmole_sq_per_second; activate_PKC_543_0__Kb = 2 per_second;
  // DEND_627_0_ * Ca_stim_549_0__Kf * Ca_input_547_0_-DEND_627_0_ * Ca_stim_549_0__Kb * Ca_545_0_
  Ca_stim_549_0_: $Ca_input_547_0_ -> Ca_545_0_; DEND_627_0_*Ca_stim_549_0__Kf*Ca_input_547_0_ - DEND_627_0_*Ca_stim_549_0__Kb*Ca_545_0_;
    Ca_stim_549_0__Kf = 500 per_second; Ca_stim_549_0__Kb = 10 per_second;
  // DEND_627_0_ * basal_phosphatase_551_0__Kf * reg_phosphatase_555_0_
  basal_phosphatase_551_0_: reg_phosphatase_555_0_ => inact_phosphatase_553_0_; DEND_627_0_*basal_phosphatase_551_0__Kf*reg_phosphatase_555_0_;
    basal_phosphatase_551_0__Kf = 0.03 per_second;
  // DEND_627_0_ * CaM_Ca3_bind_Ca_564_0__Kf * Ca_545_0_*CaM_Ca3_566_0_-DEND_627_0_ * CaM_Ca3_bind_Ca_564_0__Kb * CaM_Ca4_578_0_
  // Use K3 = 21.5 uM here from Stemmer and Klee table 3. kb/kf =21.5 * 6e5 so kf = 7.75e-7, kb = 10
  CaM_Ca3_bind_Ca_564_0_: Ca_545_0_ + CaM_Ca3_566_0_ -> CaM_Ca4_578_0_; DEND_627_0_*CaM_Ca3_bind_Ca_564_0__Kf*Ca_545_0_*CaM_Ca3_566_0_ - DEND_627_0_*CaM_Ca3_bind_Ca_564_0__Kb*CaM_Ca4_578_0_;
    CaM_Ca3_bind_Ca_564_0__Kf = 1800 litre_per_mmole_per_second; CaM_Ca3_bind_Ca_564_0__Kb = 10 per_second;
  // DEND_627_0_ * CaM_bind_Ca_568_0__Kf * Ca_545_0_*CaM_562_0_-DEND_627_0_ * CaM_bind_Ca_568_0__Kb * CaM_Ca_576_0_
  // Lets use the fast rate consts here. Since the rates are so different, I am not sure whether the order is relevant. These correspond to the TR2C fragment. We use the Martin et al rates here, plus the Drabicowski binding consts. All are scaled by 3X to cell temp. kf = 2e-10 kb = 72 Stemmer _and Klee: K1=.9, K2=1.1. Assume 1.0uM for both. kb/kf=3.6e11. If kb=72, kf = 2e-10 (Exactly the same !) 19 May 2006. Splitting the old CaM-TR2-bind-Ca reaction into two steps, each binding 1 Ca. This improves numerical stability and is conceptually better too. Overall rates are the same, so each kf and kb is the square root of the earlier ones. So kf = 1.125e-4, kb = 8.4853
  CaM_bind_Ca_568_0_: Ca_545_0_ + CaM_562_0_ -> CaM_Ca_576_0_; DEND_627_0_*CaM_bind_Ca_568_0__Kf*Ca_545_0_*CaM_562_0_ - DEND_627_0_*CaM_bind_Ca_568_0__Kb*CaM_Ca_576_0_;
    CaM_bind_Ca_568_0__Kf = 8484.6 litre_per_mmole_per_second; CaM_bind_Ca_568_0__Kb = 8.4853 per_second;
  // DEND_627_0_ * CaM_Ca2_bind_Ca_572_0__Kf * Ca_545_0_*CaM_Ca2_570_0_-DEND_627_0_ * CaM_Ca2_bind_Ca_572_0__Kb * CaM_Ca3_566_0_
  // K3 = 21.5, K4 = 2.8. Assuming that the K4 step happens first, we get kb/kf = 2.8 uM = 1.68e6 so kf =6e-6 assuming kb = 10
  CaM_Ca2_bind_Ca_572_0_: Ca_545_0_ + CaM_Ca2_570_0_ -> CaM_Ca3_566_0_; DEND_627_0_*CaM_Ca2_bind_Ca_572_0__Kf*Ca_545_0_*CaM_Ca2_570_0_ - DEND_627_0_*CaM_Ca2_bind_Ca_572_0__Kb*CaM_Ca3_566_0_;
    CaM_Ca2_bind_Ca_572_0__Kf = 3600 litre_per_mmole_per_second; CaM_Ca2_bind_Ca_572_0__Kb = 10 per_second;
  // DEND_627_0_ * CaM_Ca_bind_Ca_574_0__Kf * Ca_545_0_*CaM_Ca_576_0_-DEND_627_0_ * CaM_Ca_bind_Ca_574_0__Kb * CaM_Ca2_570_0_
  // Lets use the fast rate consts here. Since the rates are so different, I am not sure whether the order is relevant. These correspond to the TR2C fragment. We use the Martin et al rates here, plus the Drabicowski binding consts. All are scaled by 3X to cell temp. kf = 2e-10 kb = 72 Stemmer _and Klee: K1=.9, K2=1.1. Assume 1.0uM for both. kb/kf=3.6e11. If kb=72, kf = 2e-10 (Exactly the same !) 19 May 2006. Splitting the old CaM-TR2-bind-Ca reaction into two steps, each binding 1 Ca. This improves numerical stability and is conceptually better too. Overall rates are the same, so each kf and kb is the square root of the earlier ones. So kf = 1.125e-4, kb = 8.4853
  CaM_Ca_bind_Ca_574_0_: Ca_545_0_ + CaM_Ca_576_0_ -> CaM_Ca2_570_0_; DEND_627_0_*CaM_Ca_bind_Ca_574_0__Kf*Ca_545_0_*CaM_Ca_576_0_ - DEND_627_0_*CaM_Ca_bind_Ca_574_0__Kb*CaM_Ca2_570_0_;
    CaM_Ca_bind_Ca_574_0__Kf = 8484.6 litre_per_mmole_per_second; CaM_Ca_bind_Ca_574_0__Kb = 8.4853 per_second;
  // DEND_627_0_ * CaM_x2_580_0__Kf * CaM_562_0_-DEND_627_0_ * CaM_x2_580_0__Kb * CaM_xchange_582_0_
  CaM_x2_580_0_: CaM_562_0_ -> CaM_xchange_582_0_; DEND_627_0_*CaM_x2_580_0__Kf*CaM_562_0_ - DEND_627_0_*CaM_x2_580_0__Kb*CaM_xchange_582_0_;
    CaM_x2_580_0__Kf = 10 per_second; CaM_x2_580_0__Kb = 10 per_second;
  // SPINE_629_0_ * CaM_Ca3_bind_Ca_596_0__Kf * Ca_590_0_*CaM_Ca3_598_0_-SPINE_629_0_ * CaM_Ca3_bind_Ca_596_0__Kb * CaM_Ca4_610_0_
  // Use K3 = 21.5 uM here from Stemmer and Klee table 3. kb/kf =21.5 * 6e5 so kf = 7.75e-7, kb = 10
  CaM_Ca3_bind_Ca_596_0_: Ca_590_0_ + CaM_Ca3_598_0_ -> CaM_Ca4_610_0_; SPINE_629_0_*CaM_Ca3_bind_Ca_596_0__Kf*Ca_590_0_*CaM_Ca3_598_0_ - SPINE_629_0_*CaM_Ca3_bind_Ca_596_0__Kb*CaM_Ca4_610_0_;
    CaM_Ca3_bind_Ca_596_0__Kf = 1799.982 litre_per_mmole_per_second; CaM_Ca3_bind_Ca_596_0__Kb = 10 per_second;
  // SPINE_629_0_ * CaM_bind_Ca_600_0__Kf * Ca_590_0_*CaM_594_0_-SPINE_629_0_ * CaM_bind_Ca_600_0__Kb * CaM_Ca_608_0_
  // Lets use the fast rate consts here. Since the rates are so different, I am not sure whether the order is relevant. These correspond to the TR2C fragment. We use the Martin et al rates here, plus the Drabicowski binding consts. All are scaled by 3X to cell temp. kf = 2e-10 kb = 72 Stemmer _and Klee: K1=.9, K2=1.1. Assume 1.0uM for both. kb/kf=3.6e11. If kb=72, kf = 2e-10 (Exactly the same !) 19 May 2006. Splitting the old CaM-TR2-bind-Ca reaction into two steps, each binding 1 Ca. This improves numerical stability and is conceptually better too. Overall rates are the same, so each kf and kb is the square root of the earlier ones. So kf = 1.125e-4, kb = 8.4853
  CaM_bind_Ca_600_0_: Ca_590_0_ + CaM_594_0_ -> CaM_Ca_608_0_; SPINE_629_0_*CaM_bind_Ca_600_0__Kf*Ca_590_0_*CaM_594_0_ - SPINE_629_0_*CaM_bind_Ca_600_0__Kb*CaM_Ca_608_0_;
    CaM_bind_Ca_600_0__Kf = 8484.48 litre_per_mmole_per_second; CaM_bind_Ca_600_0__Kb = 8.4853 per_second;
  // SPINE_629_0_ * CaM_Ca2_bind_Ca_604_0__Kf * Ca_590_0_*CaM_Ca2_602_0_-SPINE_629_0_ * CaM_Ca2_bind_Ca_604_0__Kb * CaM_Ca3_598_0_
  // K3 = 21.5, K4 = 2.8. Assuming that the K4 step happens first, we get kb/kf = 2.8 uM = 1.68e6 so kf =6e-6 assuming kb = 10
  CaM_Ca2_bind_Ca_604_0_: Ca_590_0_ + CaM_Ca2_602_0_ -> CaM_Ca3_598_0_; SPINE_629_0_*CaM_Ca2_bind_Ca_604_0__Kf*Ca_590_0_*CaM_Ca2_602_0_ - SPINE_629_0_*CaM_Ca2_bind_Ca_604_0__Kb*CaM_Ca3_598_0_;
    CaM_Ca2_bind_Ca_604_0__Kf = 3600.072 litre_per_mmole_per_second; CaM_Ca2_bind_Ca_604_0__Kb = 10 per_second;
  // SPINE_629_0_ * CaM_Ca_bind_Ca_606_0__Kf * Ca_590_0_*CaM_Ca_608_0_-SPINE_629_0_ * CaM_Ca_bind_Ca_606_0__Kb * CaM_Ca2_602_0_
  // Lets use the fast rate consts here. Since the rates are so different, I am not sure whether the order is relevant. These correspond to the TR2C fragment. We use the Martin et al rates here, plus the Drabicowski binding consts. All are scaled by 3X to cell temp. kf = 2e-10 kb = 72 Stemmer _and Klee: K1=.9, K2=1.1. Assume 1.0uM for both. kb/kf=3.6e11. If kb=72, kf = 2e-10 (Exactly the same !) 19 May 2006. Splitting the old CaM-TR2-bind-Ca reaction into two steps, each binding 1 Ca. This improves numerical stability and is conceptually better too. Overall rates are the same, so each kf and kb is the square root of the earlier ones. So kf = 1.125e-4, kb = 8.4853
  CaM_Ca_bind_Ca_606_0_: Ca_590_0_ + CaM_Ca_608_0_ -> CaM_Ca2_602_0_; SPINE_629_0_*CaM_Ca_bind_Ca_606_0__Kf*Ca_590_0_*CaM_Ca_608_0_ - SPINE_629_0_*CaM_Ca_bind_Ca_606_0__Kb*CaM_Ca2_602_0_;
    CaM_Ca_bind_Ca_606_0__Kf = 8484.48 litre_per_mmole_per_second; CaM_Ca_bind_Ca_606_0__Kb = 8.4853 per_second;
  // SPINE_629_0_ * CaM_x2_612_0__Kf * CaM_594_0_-SPINE_629_0_ * CaM_x2_612_0__Kb * CaM_xchange_614_0_
  CaM_x2_612_0_: CaM_594_0_ -> CaM_xchange_614_0_; SPINE_629_0_*CaM_x2_612_0__Kf*CaM_594_0_ - SPINE_629_0_*CaM_x2_612_0__Kb*CaM_xchange_614_0_;
    CaM_x2_612_0__Kf = 1 per_second; CaM_x2_612_0__Kb = 100 per_second;
  // DEND_627_0_ * ( k1 * phosphatase_503_0_*P_MAPK_508_0_ - k2 * P_cplx_506_0_ )
  P_505_0_Complex_formation_: phosphatase_503_0_ + P_MAPK_508_0_ -> P_cplx_506_0_; DEND_627_0_*(P_505_0_Complex_formation__k1*phosphatase_503_0_*P_MAPK_508_0_ - P_505_0_Complex_formation__k2*P_cplx_506_0_);
    P_505_0_Complex_formation__k1 = 249082.8 litre_per_mmole_per_second; P_505_0_Complex_formation__k2 = 4 per_second;
  // DEND_627_0_ * k3*P_cplx_506_0_
  P_505_0_Product_formation_: P_cplx_506_0_ => MAPK_519_0_ + phosphatase_503_0_; DEND_627_0_*P_505_0_Product_formation__k3*P_cplx_506_0_;
    P_505_0_Product_formation__k3 = 1 per_second;
  // DEND_627_0_ * ( k1 * P_MAPK_508_0_*APC_532_0_ - k2 * PLA2_cplx_511_0_ )
  PLA2_510_0_Complex_formation_: P_MAPK_508_0_ + $APC_532_0_ -> PLA2_cplx_511_0_; DEND_627_0_*(PLA2_510_0_Complex_formation__k1*P_MAPK_508_0_*APC_532_0_ - PLA2_510_0_Complex_formation__k2*PLA2_cplx_511_0_);
    PLA2_510_0_Complex_formation__k1 = 9963.266 litre_per_mmole_per_second; PLA2_510_0_Complex_formation__k2 = 40 per_second;
  // DEND_627_0_ * k3*PLA2_cplx_511_0_
  PLA2_510_0_Product_formation_: PLA2_cplx_511_0_ => AA_523_0_ + P_MAPK_508_0_; DEND_627_0_*PLA2_510_0_Product_formation__k3*PLA2_cplx_511_0_;
    PLA2_510_0_Product_formation__k3 = 10 per_second;
  // DEND_627_0_ * ( k1 * P_MAPK_508_0_*inact_phosphatase_553_0_ - k2 * activate_phosphatase_cplx_514_0_ )
  activate_phosphatase_513_0_Complex_formation_: P_MAPK_508_0_ + inact_phosphatase_553_0_ -> activate_phosphatase_cplx_514_0_; DEND_627_0_*(activate_phosphatase_513_0_Complex_formation__k1*P_MAPK_508_0_*inact_phosphatase_553_0_ - activate_phosphatase_513_0_Complex_formation__k2*activate_phosphatase_cplx_514_0_);
    activate_phosphatase_513_0_Complex_formation__k1 = 498.1633 litre_per_mmole_per_second; activate_phosphatase_513_0_Complex_formation__k2 = 0.4 per_second;
  // DEND_627_0_ * k3*activate_phosphatase_cplx_514_0_
  activate_phosphatase_513_0_Product_formation_: activate_phosphatase_cplx_514_0_ => reg_phosphatase_555_0_ + P_MAPK_508_0_; DEND_627_0_*activate_phosphatase_513_0_Product_formation__k3*activate_phosphatase_cplx_514_0_;
    activate_phosphatase_513_0_Product_formation__k3 = 0.1 per_second;
  // DEND_627_0_ * ( k1 * P_MAPK_508_0_*channel_584_0_ - k2 * phosph_chan_cplx_517_0_ )
  phosph_chan_516_0_Complex_formation_: P_MAPK_508_0_ + channel_584_0_ -> phosph_chan_cplx_517_0_; DEND_627_0_*(phosph_chan_516_0_Complex_formation__k1*P_MAPK_508_0_*channel_584_0_ - phosph_chan_516_0_Complex_formation__k2*phosph_chan_cplx_517_0_);
    phosph_chan_516_0_Complex_formation__k1 = 49816.33 litre_per_mmole_per_second; phosph_chan_516_0_Complex_formation__k2 = 200 per_second;
  // DEND_627_0_ * k3*phosph_chan_cplx_517_0_
  phosph_chan_516_0_Product_formation_: phosph_chan_cplx_517_0_ => channel_p_586_0_ + P_MAPK_508_0_; DEND_627_0_*phosph_chan_516_0_Product_formation__k3*phosph_chan_cplx_517_0_;
    phosph_chan_516_0_Product_formation__k3 = 50 per_second;
  // DEND_627_0_ * ( k1 * act_PKC_525_0_*MAPK_519_0_ - k2 * MAPKK_cplx_528_0_ )
  MAPKK_527_0_Complex_formation_: act_PKC_525_0_ + MAPK_519_0_ -> MAPKK_cplx_528_0_; DEND_627_0_*(MAPKK_527_0_Complex_formation__k1*act_PKC_525_0_*MAPK_519_0_ - MAPKK_527_0_Complex_formation__k2*MAPKK_cplx_528_0_);
    MAPKK_527_0_Complex_formation__k1 = 9963.266 litre_per_mmole_per_second; MAPKK_527_0_Complex_formation__k2 = 40 per_second;
  // DEND_627_0_ * k3*MAPKK_cplx_528_0_
  MAPKK_527_0_Product_formation_: MAPKK_cplx_528_0_ => P_MAPK_508_0_ + act_PKC_525_0_; DEND_627_0_*MAPKK_527_0_Product_formation__k3*MAPKK_cplx_528_0_;
    MAPKK_527_0_Product_formation__k3 = 10 per_second;
  // DEND_627_0_ * ( k1 * act_Raf_538_0_*MAPK_519_0_ - k2 * MAPKKK_cplx_541_0_ )
  MAPKKK_540_0_Complex_formation_: act_Raf_538_0_ + MAPK_519_0_ -> MAPKKK_cplx_541_0_; DEND_627_0_*(MAPKKK_540_0_Complex_formation__k1*act_Raf_538_0_*MAPK_519_0_ - MAPKKK_540_0_Complex_formation__k2*MAPKKK_cplx_541_0_);
    MAPKKK_540_0_Complex_formation__k1 = 2490.709 litre_per_mmole_per_second; MAPKKK_540_0_Complex_formation__k2 = 40 per_second;
  // DEND_627_0_ * k3*MAPKKK_cplx_541_0_
  MAPKKK_540_0_Product_formation_: MAPKKK_cplx_541_0_ => P_MAPK_508_0_ + act_Raf_538_0_; DEND_627_0_*MAPKKK_540_0_Product_formation__k3*MAPKKK_cplx_541_0_;
    MAPKKK_540_0_Product_formation__k3 = 10 per_second;
  // DEND_627_0_ * ( k1 * reg_phosphatase_555_0_*P_MAPK_508_0_ - k2 * P_cplx_558_0_ )
  P_557_0_Complex_formation_: reg_phosphatase_555_0_ + P_MAPK_508_0_ -> P_cplx_558_0_; DEND_627_0_*(P_557_0_Complex_formation__k1*reg_phosphatase_555_0_*P_MAPK_508_0_ - P_557_0_Complex_formation__k2*P_cplx_558_0_);
    P_557_0_Complex_formation__k1 = 99634.32 litre_per_mmole_per_second; P_557_0_Complex_formation__k2 = 8 per_second;
  // DEND_627_0_ * k3*P_cplx_558_0_
  P_557_0_Product_formation_: P_cplx_558_0_ => MAPK_519_0_ + reg_phosphatase_555_0_; DEND_627_0_*P_557_0_Product_formation__k3*P_cplx_558_0_;
    P_557_0_Product_formation__k3 = 2 per_second;

  // Unit definitions:
  unit volume = litre;
  unit substance = 1e-3 mole;
  unit length = metre;
  unit area = metre^2;
  unit time = second;
  unit per_second = 1 / second;
  unit litre_per_mmole_per_second = litre / (1e-3 mole * second);
  unit sq_litre_per_mmole_sq_per_second = litre^2 / ((1e-3 mole)^2 * second);
end
