// SBML level 3 version 1

model CICRspineDend()
  // model units - substance: substance, time: time, volume: volume, area: area, length: length, extent: substance

  // Compartments:
  compartment kinetics_1022_0_ = 3.1115e-15 volume;
  compartment compartment_1_1111_0_ = 3.9e-16 volume;
  compartment compartment_2_1113_0_ = 1e-16 volume;

  // Species:
  species phase_1029_0_ in kinetics_1022_0_ = 0.1;
  species CaIP3_3_R_1031_0_ in kinetics_1022_0_ = 0;
  species Serca_1033_0_ in kinetics_1022_0_ = 0.001999946;
  species CaM_1037_0_ in kinetics_1022_0_ = 0;
  species CaMCa_1039_0_ in kinetics_1022_0_ = 0;
  species CaMCa2_1041_0_ in kinetics_1022_0_ = 0;
  species CaMCa3_1043_0_ in kinetics_1022_0_ = 0;
  species CaMCa4_1045_0_ in kinetics_1022_0_ = 0;
  species IP3_R_1047_0_ in kinetics_1022_0_ = 0.0001;
  species IP3_3_R_1049_0_ in kinetics_1022_0_ = 0;
  species $IP3_1051_0_ in kinetics_1022_0_ = 0.0001;
  species Ca2_IP3_3_R_1053_0_ in kinetics_1022_0_ = 0;
  species Mirror_CaIP3_3_R_1055_0_ in kinetics_1022_0_;
  species ActIP3R_1057_0_ in kinetics_1022_0_ = 0;
  species basal_1061_0_ in kinetics_1022_0_ = 0;
  species $BufPool_1063_0_ in kinetics_1022_0_ = 0;
  species CaER_1085_0_ in compartment_1_1111_0_ = 0.408594;
  species leakPool_1087_0_ in compartment_1_1111_0_ = 0.001;
  species Ca_1091_0_ in kinetics_1022_0_ = 7.999893e-5;
  species Ca_1095_0_ in compartment_2_1113_0_ = 8e-5;
  species $CaExtracell_1097_0_ in kinetics_1022_0_ = 7.999893e-5;

  // Assignment rules:
  Mirror_CaIP3_3_R_1055_0_ := CaIP3_3_R_1031_0_;

  // Reactions:
  // kinetics_1022_0_ * ( Permeability) * ActIP3R_1057_0_ * (CaER_1085_0_ - Ca_1091_0_)
  chan_1059_0_: CaER_1085_0_ -> Ca_1091_0_; kinetics_1022_0_*chan_1059_0__Permeability*ActIP3R_1057_0_*(CaER_1085_0_ - Ca_1091_0_);  // modifiers: ActIP3R_1057_0_
    chan_1059_0__Permeability = 8000 litre_per_mmole_per_second;
  // compartment_1_1111_0_ * ( Permeability) * leakPool_1087_0_ * (CaER_1085_0_ - Ca_1091_0_)
  leakChan_1089_0_: CaER_1085_0_ -> Ca_1091_0_; compartment_1_1111_0_*leakChan_1089_0__Permeability*leakPool_1087_0_*(CaER_1085_0_ - Ca_1091_0_);  // modifiers: leakPool_1087_0_
    leakChan_1089_0__Permeability = 40 litre_per_mmole_per_second;
  // kinetics_1022_0_ * CaMreac1_1065_0__Kf * CaM_1037_0_*Ca_1091_0_-kinetics_1022_0_ * CaMreac1_1065_0__Kb * CaMCa_1039_0_
  CaMreac1_1065_0_: CaM_1037_0_ + Ca_1091_0_ -> CaMCa_1039_0_; kinetics_1022_0_*CaMreac1_1065_0__Kf*CaM_1037_0_*Ca_1091_0_ - kinetics_1022_0_*CaMreac1_1065_0__Kb*CaMCa_1039_0_;
    CaMreac1_1065_0__Kf = 8484.87381 litre_per_mmole_per_second; CaMreac1_1065_0__Kb = 8.4853 per_second;
  // kinetics_1022_0_ * CaMreac2_1067_0__Kf * CaMCa_1039_0_*Ca_1091_0_-kinetics_1022_0_ * CaMreac2_1067_0__Kb * CaMCa2_1041_0_
  CaMreac2_1067_0_: CaMCa_1039_0_ + Ca_1091_0_ -> CaMCa2_1041_0_; kinetics_1022_0_*CaMreac2_1067_0__Kf*CaMCa_1039_0_*Ca_1091_0_ - kinetics_1022_0_*CaMreac2_1067_0__Kb*CaMCa2_1041_0_;
    CaMreac2_1067_0__Kf = 8484.87381 litre_per_mmole_per_second; CaMreac2_1067_0__Kb = 8.4853 per_second;
  // kinetics_1022_0_ * CaMreac3_1069_0__Kf * CaMCa2_1041_0_*Ca_1091_0_-kinetics_1022_0_ * CaMreac3_1069_0__Kb * CaMCa3_1043_0_
  CaMreac3_1069_0_: CaMCa2_1041_0_ + Ca_1091_0_ -> CaMCa3_1043_0_; kinetics_1022_0_*CaMreac3_1069_0__Kf*CaMCa2_1041_0_*Ca_1091_0_ - kinetics_1022_0_*CaMreac3_1069_0__Kb*CaMCa3_1043_0_;
    CaMreac3_1069_0__Kf = 3600.12996 litre_per_mmole_per_second; CaMreac3_1069_0__Kb = 10 per_second;
  // kinetics_1022_0_ * CaMreac4_1071_0__Kf * CaMCa3_1043_0_*Ca_1091_0_-kinetics_1022_0_ * CaMreac4_1071_0__Kb * CaMCa4_1045_0_
  CaMreac4_1071_0_: CaMCa3_1043_0_ + Ca_1091_0_ -> CaMCa4_1045_0_; kinetics_1022_0_*CaMreac4_1071_0__Kf*CaMCa3_1043_0_*Ca_1091_0_ - kinetics_1022_0_*CaMreac4_1071_0__Kb*CaMCa4_1045_0_;
    CaMreac4_1071_0__Kf = 1800.046 litre_per_mmole_per_second; CaMreac4_1071_0__Kb = 10 per_second;
  // kinetics_1022_0_ * Reac_1073_0__Kf * IP3_R_1047_0_*IP3_1051_0_-kinetics_1022_0_ * Reac_1073_0__Kb * IP3_3_R_1049_0_
  Reac_1073_0_: IP3_R_1047_0_ + $IP3_1051_0_ -> IP3_3_R_1049_0_; kinetics_1022_0_*Reac_1073_0__Kf*IP3_R_1047_0_*IP3_1051_0_ - kinetics_1022_0_*Reac_1073_0__Kb*IP3_3_R_1049_0_;
    Reac_1073_0__Kf = 12000.25 litre_per_mmole_per_second; Reac_1073_0__Kb = 8 per_second;
  // kinetics_1022_0_ * Reac2_1075_0__Kf * IP3_3_R_1049_0_*Ca_1091_0_-kinetics_1022_0_ * Reac2_1075_0__Kb * CaIP3_3_R_1031_0_
  Reac2_1075_0_: IP3_3_R_1049_0_ + Ca_1091_0_ -> CaIP3_3_R_1031_0_; kinetics_1022_0_*Reac2_1075_0__Kf*IP3_3_R_1049_0_*Ca_1091_0_ - kinetics_1022_0_*Reac2_1075_0__Kb*CaIP3_3_R_1031_0_;
    Reac2_1075_0__Kf = 15000.17 litre_per_mmole_per_second; Reac2_1075_0__Kb = 1.65 per_second;
  // kinetics_1022_0_ * Reac4_1077_0__Kf * CaIP3_3_R_1031_0_*Ca_1091_0_-kinetics_1022_0_ * Reac4_1077_0__Kb * Ca2_IP3_3_R_1053_0_
  Reac4_1077_0_: CaIP3_3_R_1031_0_ + Ca_1091_0_ -> Ca2_IP3_3_R_1053_0_; kinetics_1022_0_*Reac4_1077_0__Kf*CaIP3_3_R_1031_0_*Ca_1091_0_ - kinetics_1022_0_*Reac4_1077_0__Kb*Ca2_IP3_3_R_1053_0_;
    Reac4_1077_0__Kf = 1800.102 litre_per_mmole_per_second; Reac4_1077_0__Kb = 0.21 per_second;
  // kinetics_1022_0_ * Reac1_1079_0__Kf * Mirror_CaIP3_3_R_1055_0_^3-kinetics_1022_0_ * Reac1_1079_0__Kb * ActIP3R_1057_0_
  Reac1_1079_0_: 3 Mirror_CaIP3_3_R_1055_0_ -> ActIP3R_1057_0_; kinetics_1022_0_*Reac1_1079_0__Kf*Mirror_CaIP3_3_R_1055_0_^3 - kinetics_1022_0_*Reac1_1079_0__Kb*ActIP3R_1057_0_;
    Reac1_1079_0__Kf = 5.200091e8 sq_litre_per_mmole_sq_per_second; Reac1_1079_0__Kb = 5 per_second;
  // kinetics_1022_0_ * Ca_regn_1099_0__Kf * Ca_1091_0_-kinetics_1022_0_ * Ca_regn_1099_0__Kb * CaExtracell_1097_0_
  Ca_regn_1099_0_: Ca_1091_0_ -> $CaExtracell_1097_0_; kinetics_1022_0_*Ca_regn_1099_0__Kf*Ca_1091_0_ - kinetics_1022_0_*Ca_regn_1099_0__Kb*CaExtracell_1097_0_;
    Ca_regn_1099_0__Kf = 0.1 per_second; Ca_regn_1099_0__Kb = 0.1 per_second;
  // kinetics_1022_0_ * ( kcat * Ca_1091_0_ * Serca_1033_0_/(Km + Ca_1091_0_))
  MMenz_SERCA_1035_0_: Ca_1091_0_ -> CaER_1085_0_; kinetics_1022_0_*(kcat*Ca_1091_0_*Serca_1033_0_/(Km + Ca_1091_0_));  // modifiers: Serca_1033_0_
    Km = 0.0001499993 mmole_per_litre; kcat = 8 per_second;

  // Unit definitions:
  unit volume = litre;
  unit substance = 1e-3 mole;
  unit length = metre;
  unit area = metre^2;
  unit time = second;
  unit litre_per_mmole_per_second = litre / (1e-3 mole * second);
  unit per_second = 1 / second;
  unit sq_litre_per_mmole_sq_per_second = litre^2 / ((1e-3 mole)^2 * second);
  unit mmole_per_litre = 1e-3 mole / litre;
end
