// SBML level 3 version 1

model CICRwithConcChan()
  // model units - substance: substance, time: time, volume: volume, area: area, length: length, extent: substance

  // Compartments:
  compartment kinetics_1128_0_ = 3.1115e-15 volume;
  compartment compartment_1_1201_0_ = 3.9e-16 volume;

  // Species:
  species CaCyt_1137_0_ in kinetics_1128_0_ = 7.999893e-5;
  species CaIP3_3_R_1139_0_ in kinetics_1128_0_ = 0;
  species CaER_1141_0_ in compartment_1_1201_0_ = 0.408594;
  species Serca_1143_0_ in kinetics_1128_0_ = 0.001999946;
  species CaM_1147_0_ in kinetics_1128_0_ = 0;
  species CaMCa_1149_0_ in kinetics_1128_0_ = 0;
  species CaMCa2_1151_0_ in kinetics_1128_0_ = 0;
  species CaMCa3_1153_0_ in kinetics_1128_0_ = 0;
  species CaMCa4_1155_0_ in kinetics_1128_0_ = 0;
  species IP3_R_1157_0_ in kinetics_1128_0_ = 0.0001;
  species IP3_3_R_1159_0_ in kinetics_1128_0_ = 0;
  species $IP3_1161_0_ in kinetics_1128_0_ = 0.007999893;
  species Ca2_IP3_3_R_1163_0_ in kinetics_1128_0_ = 0;
  species Mirror_CaIP3_3_R_1165_0_ in kinetics_1128_0_;
  species ActIP3R_1167_0_ in kinetics_1128_0_ = 0;
  species leakPool_1187_0_ in compartment_1_1201_0_ = 0.001;

  // Assignment rules:
  Mirror_CaIP3_3_R_1165_0_ := CaIP3_3_R_1139_0_;

  // Reactions:
  // kinetics_1128_0_ * ( Permeability) * ActIP3R_1167_0_ * (CaER_1141_0_ - CaCyt_1137_0_)
  chan_1169_0_: CaER_1141_0_ -> CaCyt_1137_0_; kinetics_1128_0_*chan_1169_0__Permeability*ActIP3R_1167_0_*(CaER_1141_0_ - CaCyt_1137_0_);  // modifiers: ActIP3R_1167_0_
    chan_1169_0__Permeability = 8000 litre_per_mmole_per_second;
  // compartment_1_1201_0_ * ( Permeability) * leakPool_1187_0_ * (CaER_1141_0_ - CaCyt_1137_0_)
  leakChan_1189_0_: CaER_1141_0_ -> CaCyt_1137_0_; compartment_1_1201_0_*leakChan_1189_0__Permeability*leakPool_1187_0_*(CaER_1141_0_ - CaCyt_1137_0_);  // modifiers: leakPool_1187_0_
    leakChan_1189_0__Permeability = 40 litre_per_mmole_per_second;
  // kinetics_1128_0_ * CaMreac1_1171_0__Kf * CaCyt_1137_0_*CaM_1147_0_-kinetics_1128_0_ * CaMreac1_1171_0__Kb * CaMCa_1149_0_
  CaMreac1_1171_0_: CaCyt_1137_0_ + CaM_1147_0_ -> CaMCa_1149_0_; kinetics_1128_0_*CaMreac1_1171_0__Kf*CaCyt_1137_0_*CaM_1147_0_ - kinetics_1128_0_*CaMreac1_1171_0__Kb*CaMCa_1149_0_;
    CaMreac1_1171_0__Kf = 8484.87381 litre_per_mmole_per_second; CaMreac1_1171_0__Kb = 8.4853 per_second;
  // kinetics_1128_0_ * CaMreac2_1173_0__Kf * CaCyt_1137_0_*CaMCa_1149_0_-kinetics_1128_0_ * CaMreac2_1173_0__Kb * CaMCa2_1151_0_
  CaMreac2_1173_0_: CaCyt_1137_0_ + CaMCa_1149_0_ -> CaMCa2_1151_0_; kinetics_1128_0_*CaMreac2_1173_0__Kf*CaCyt_1137_0_*CaMCa_1149_0_ - kinetics_1128_0_*CaMreac2_1173_0__Kb*CaMCa2_1151_0_;
    CaMreac2_1173_0__Kf = 8484.87381 litre_per_mmole_per_second; CaMreac2_1173_0__Kb = 8.4853 per_second;
  // kinetics_1128_0_ * CaMreac3_1175_0__Kf * CaCyt_1137_0_*CaMCa2_1151_0_-kinetics_1128_0_ * CaMreac3_1175_0__Kb * CaMCa3_1153_0_
  CaMreac3_1175_0_: CaCyt_1137_0_ + CaMCa2_1151_0_ -> CaMCa3_1153_0_; kinetics_1128_0_*CaMreac3_1175_0__Kf*CaCyt_1137_0_*CaMCa2_1151_0_ - kinetics_1128_0_*CaMreac3_1175_0__Kb*CaMCa3_1153_0_;
    CaMreac3_1175_0__Kf = 3600.12996 litre_per_mmole_per_second; CaMreac3_1175_0__Kb = 10 per_second;
  // kinetics_1128_0_ * CaMreac4_1177_0__Kf * CaCyt_1137_0_*CaMCa3_1153_0_-kinetics_1128_0_ * CaMreac4_1177_0__Kb * CaMCa4_1155_0_
  CaMreac4_1177_0_: CaCyt_1137_0_ + CaMCa3_1153_0_ -> CaMCa4_1155_0_; kinetics_1128_0_*CaMreac4_1177_0__Kf*CaCyt_1137_0_*CaMCa3_1153_0_ - kinetics_1128_0_*CaMreac4_1177_0__Kb*CaMCa4_1155_0_;
    CaMreac4_1177_0__Kf = 1800.046 litre_per_mmole_per_second; CaMreac4_1177_0__Kb = 10 per_second;
  // kinetics_1128_0_ * Reac_1179_0__Kf * IP3_R_1157_0_*IP3_1161_0_-kinetics_1128_0_ * Reac_1179_0__Kb * IP3_3_R_1159_0_
  Reac_1179_0_: IP3_R_1157_0_ + $IP3_1161_0_ -> IP3_3_R_1159_0_; kinetics_1128_0_*Reac_1179_0__Kf*IP3_R_1157_0_*IP3_1161_0_ - kinetics_1128_0_*Reac_1179_0__Kb*IP3_3_R_1159_0_;
    Reac_1179_0__Kf = 12000.25 litre_per_mmole_per_second; Reac_1179_0__Kb = 8 per_second;
  // kinetics_1128_0_ * Reac2_1181_0__Kf * CaCyt_1137_0_*IP3_3_R_1159_0_-kinetics_1128_0_ * Reac2_1181_0__Kb * CaIP3_3_R_1139_0_
  Reac2_1181_0_: CaCyt_1137_0_ + IP3_3_R_1159_0_ -> CaIP3_3_R_1139_0_; kinetics_1128_0_*Reac2_1181_0__Kf*CaCyt_1137_0_*IP3_3_R_1159_0_ - kinetics_1128_0_*Reac2_1181_0__Kb*CaIP3_3_R_1139_0_;
    Reac2_1181_0__Kf = 15000.17 litre_per_mmole_per_second; Reac2_1181_0__Kb = 1.65 per_second;
  // kinetics_1128_0_ * Reac4_1183_0__Kf * CaCyt_1137_0_*CaIP3_3_R_1139_0_-kinetics_1128_0_ * Reac4_1183_0__Kb * Ca2_IP3_3_R_1163_0_
  Reac4_1183_0_: CaCyt_1137_0_ + CaIP3_3_R_1139_0_ -> Ca2_IP3_3_R_1163_0_; kinetics_1128_0_*Reac4_1183_0__Kf*CaCyt_1137_0_*CaIP3_3_R_1139_0_ - kinetics_1128_0_*Reac4_1183_0__Kb*Ca2_IP3_3_R_1163_0_;
    Reac4_1183_0__Kf = 1800.102 litre_per_mmole_per_second; Reac4_1183_0__Kb = 0.21 per_second;
  // kinetics_1128_0_ * Reac1_1185_0__Kf * Mirror_CaIP3_3_R_1165_0_^3-kinetics_1128_0_ * Reac1_1185_0__Kb * ActIP3R_1167_0_
  Reac1_1185_0_: 3 Mirror_CaIP3_3_R_1165_0_ -> ActIP3R_1167_0_; kinetics_1128_0_*Reac1_1185_0__Kf*Mirror_CaIP3_3_R_1165_0_^3 - kinetics_1128_0_*Reac1_1185_0__Kb*ActIP3R_1167_0_;
    Reac1_1185_0__Kf = 5.200091e8 sq_litre_per_mmole_sq_per_second; Reac1_1185_0__Kb = 5 per_second;
  // kinetics_1128_0_ * ( kcat * CaCyt_1137_0_ * Serca_1143_0_/(Km + CaCyt_1137_0_))
  MMenz_SERCA_1145_0_: CaCyt_1137_0_ -> CaER_1141_0_; kinetics_1128_0_*(kcat*CaCyt_1137_0_*Serca_1143_0_/(Km + CaCyt_1137_0_));  // modifiers: Serca_1143_0_
    Km = 0.0001499993 mmole_per_litre; kcat = 8 per_second;

  // Unit definitions:
  unit volume = litre;
  unit substance = 1e-3 mole;
  unit length = metre;
  unit area = metre^2;
  unit time = second;
  unit litre_per_mmole_per_second = litre / (1e-3 mole * second);
  unit per_second = 1 / second;
  unit sq_litre_per_mmole_sq_per_second = litre^2 / ((1e-3 mole)^2 * second);
  unit mmole_per_litre = 1e-3 mole / litre;
end
