// SBML level 3 version 1

model OSC_different_vols()
  // Compartment
  // model units - substance: substance, time: time, volume: volume, area: area, length: length, extent: substance

  // Compartments:
  compartment B_705_0_ = 1e-17 volume;
  compartment A_707_0_ = 2e-17 volume;

  // Species:
  species P_659_0_ in B_705_0_ = 0.0001;
  species kenz_cplx_662_0_ in B_705_0_ = 0;
  species M_666_0_ in B_705_0_ = 0;
  species M_p_668_0_ in B_705_0_ = 0;
  species kenz_cplx_671_0_ in B_705_0_ = 0;
  species Stot_679_0_ in A_707_0_;
  species P_681_0_ in A_707_0_ = 4.999917e-5;
  species kenz_cplx_684_0_ in A_707_0_ = 0;
  species M_686_0_ in A_707_0_ = 0.00175;
  species M_p_688_0_ in A_707_0_ = 0;
  species kenz_cplx_691_0_ in A_707_0_ = 0;

  // Assignment rules:
  Stot_679_0_ := M_686_0_ + M_p_688_0_ + kenz_cplx_691_0_ + kenz_cplx_684_0_ + kenz_cplx_691_0_;

  // Reactions:
  // B_705_0_ * basal_664_0__Kf * M_666_0_
  basal_664_0_: M_666_0_ => M_p_668_0_; B_705_0_*basal_664_0__Kf*M_666_0_;
    basal_664_0__Kf = 0.01 per_second;
  // B_705_0_ * exo_673_0__Kf * M_p_668_0_
  exo_673_0_: M_p_668_0_ => M_p_688_0_; B_705_0_*exo_673_0__Kf*M_p_668_0_;
    exo_673_0__Kf = 0.005 per_second;
  // A_707_0_ * basal_677_0__Kf * M_686_0_
  basal_677_0_: M_686_0_ => M_p_688_0_; A_707_0_*basal_677_0__Kf*M_686_0_;
    basal_677_0__Kf = 0.01 per_second;
  // A_707_0_ * endo_693_0__Kf * M_686_0_
  endo_693_0_: M_686_0_ => M_666_0_; A_707_0_*endo_693_0__Kf*M_686_0_;
    endo_693_0__Kf = 0.01 per_second;
  // B_705_0_ * ( k1 * P_659_0_*M_p_668_0_ - k2 * kenz_cplx_662_0_ )
  kenz_661_0_Complex_formation_: P_659_0_ + M_p_668_0_ -> kenz_cplx_662_0_; B_705_0_*(kenz_661_0_Complex_formation__k1*P_659_0_*M_p_668_0_ - kenz_661_0_Complex_formation__k2*kenz_cplx_662_0_);
    kenz_661_0_Complex_formation__k1 = 99634.32 litre_per_mmole_per_second; kenz_661_0_Complex_formation__k2 = 4 per_second;
  // B_705_0_ * k3*kenz_cplx_662_0_
  kenz_661_0_Product_formation_: kenz_cplx_662_0_ => M_666_0_ + P_659_0_; B_705_0_*kenz_661_0_Product_formation__k3*kenz_cplx_662_0_;
    kenz_661_0_Product_formation__k3 = 1 per_second;
  // B_705_0_ * ( k1 * M_p_668_0_*M_666_0_ - k2 * kenz_cplx_671_0_ )
  kenz_670_0_Complex_formation_: M_p_668_0_ + M_666_0_ -> kenz_cplx_671_0_; B_705_0_*(kenz_670_0_Complex_formation__k1*M_p_668_0_*M_666_0_ - kenz_670_0_Complex_formation__k2*kenz_cplx_671_0_);
    kenz_670_0_Complex_formation__k1 = 2490.828 litre_per_mmole_per_second; kenz_670_0_Complex_formation__k2 = 2 per_second;
  // B_705_0_ * k3*kenz_cplx_671_0_
  kenz_670_0_Product_formation_: kenz_cplx_671_0_ => 2 M_p_668_0_; B_705_0_*kenz_670_0_Product_formation__k3*kenz_cplx_671_0_;
    kenz_670_0_Product_formation__k3 = 0.5 per_second;
  // A_707_0_ * ( k1 * P_681_0_*M_p_688_0_ - k2 * kenz_cplx_684_0_ )
  kenz_683_0_Complex_formation_: P_681_0_ + M_p_688_0_ -> kenz_cplx_684_0_; A_707_0_*(kenz_683_0_Complex_formation__k1*P_681_0_*M_p_688_0_ - kenz_683_0_Complex_formation__k2*kenz_cplx_684_0_);
    kenz_683_0_Complex_formation__k1 = 199268.6 litre_per_mmole_per_second; kenz_683_0_Complex_formation__k2 = 4 per_second;
  // A_707_0_ * k3*kenz_cplx_684_0_
  kenz_683_0_Product_formation_: kenz_cplx_684_0_ => M_686_0_ + P_681_0_; A_707_0_*kenz_683_0_Product_formation__k3*kenz_cplx_684_0_;
    kenz_683_0_Product_formation__k3 = 1 per_second;
  // A_707_0_ * ( k1 * M_p_688_0_*M_686_0_ - k2 * kenz_cplx_691_0_ )
  kenz_690_0_Complex_formation_: M_p_688_0_ + M_686_0_ -> kenz_cplx_691_0_; A_707_0_*(kenz_690_0_Complex_formation__k1*M_p_688_0_*M_686_0_ - kenz_690_0_Complex_formation__k2*kenz_cplx_691_0_);
    kenz_690_0_Complex_formation__k1 = 4981.656 litre_per_mmole_per_second; kenz_690_0_Complex_formation__k2 = 2 per_second;
  // A_707_0_ * k3*kenz_cplx_691_0_
  kenz_690_0_Product_formation_: kenz_cplx_691_0_ => 2 M_p_688_0_; A_707_0_*kenz_690_0_Product_formation__k3*kenz_cplx_691_0_;
    kenz_690_0_Product_formation__k3 = 0.5 per_second;

  // Unit definitions:
  unit volume = litre;
  unit substance = 1e-3 mole;
  unit length = metre;
  unit area = metre^2;
  unit time = second;
  unit per_second = 1 / second;
  unit litre_per_mmole_per_second = litre / (1e-3 mole * second);
end
