// SBML level 3 version 1

model chanPhosphByCaMKII()
  // model units - substance: substance, time: time, volume: volume, area: area, length: length, extent: substance

  // Compartments:
  compartment kinetics_980_0_ = 1e-16 volume;

  // Species:
  species CaM_987_0_ in kinetics_980_0_ = 0.005;
  species Ca_CaM_989_0_ in kinetics_980_0_ = 0;
  species $Ca_991_0_ in kinetics_980_0_ = 8e-5;
  species CaMKII_995_0_ in kinetics_980_0_ = 0.008333333;
  species Ca_CaM_CaMKII_997_0_ in kinetics_980_0_ = 0;
  species kinase_cplx_1000_0_ in kinetics_980_0_ = 0;
  species chan_1002_0_ in kinetics_980_0_ = 0.001;
  species chan_p_1004_0_ in kinetics_980_0_ = 0;

  // Reactions:
  // kinetics_980_0_ * CaM_bind_CaMKII_993_0__Kf * Ca_CaM_989_0_*CaMKII_995_0_-kinetics_980_0_ * CaM_bind_CaMKII_993_0__Kb * Ca_CaM_CaMKII_997_0_
  CaM_bind_CaMKII_993_0_: Ca_CaM_989_0_ + CaMKII_995_0_ -> Ca_CaM_CaMKII_997_0_; kinetics_980_0_*CaM_bind_CaMKII_993_0__Kf*Ca_CaM_989_0_*CaMKII_995_0_ - kinetics_980_0_*CaM_bind_CaMKII_993_0__Kb*Ca_CaM_CaMKII_997_0_;
    CaM_bind_CaMKII_993_0__Kf = 100.002 litre_per_mmole_per_second; CaM_bind_CaMKII_993_0__Kb = 1 per_second;
  // kinetics_980_0_ * Ca_bind_CaM_1006_0__Kf * CaM_987_0_*Ca_991_0_^2-kinetics_980_0_ * Ca_bind_CaM_1006_0__Kb * Ca_CaM_989_0_
  // This should actually be 4th order in Ca. Using 2nd order here for simplicity and to lessen numerical stiffness.
  Ca_bind_CaM_1006_0_: CaM_987_0_ + 2 $Ca_991_0_ -> Ca_CaM_989_0_; kinetics_980_0_*Ca_bind_CaM_1006_0__Kf*CaM_987_0_*Ca_991_0_^2 - kinetics_980_0_*Ca_bind_CaM_1006_0__Kb*Ca_CaM_989_0_;
    Ca_bind_CaM_1006_0__Kf = 10000080 sq_litre_per_mmole_sq_per_second; Ca_bind_CaM_1006_0__Kb = 40 per_second;
  // kinetics_980_0_ * dephosph_1008_0__Kf * chan_p_1004_0_
  dephosph_1008_0_: chan_p_1004_0_ => chan_1002_0_; kinetics_980_0_*dephosph_1008_0__Kf*chan_p_1004_0_;
    dephosph_1008_0__Kf = 1 per_second;
  // kinetics_980_0_ * ( k1 * Ca_CaM_CaMKII_997_0_*chan_1002_0_ - k2 * kinase_cplx_1000_0_ )
  kinase_999_0_Complex_formation_: Ca_CaM_CaMKII_997_0_ + chan_1002_0_ -> kinase_cplx_1000_0_; kinetics_980_0_*(k1*Ca_CaM_CaMKII_997_0_*chan_1002_0_ - k2*kinase_cplx_1000_0_);
    k1 = 9963.432 litre_per_mmole_per_second; k2 = 8 per_second;
  // kinetics_980_0_ * k3*kinase_cplx_1000_0_
  kinase_999_0_Product_formation_: kinase_cplx_1000_0_ => chan_p_1004_0_ + Ca_CaM_CaMKII_997_0_; kinetics_980_0_*k3*kinase_cplx_1000_0_;
    k3 = 2 per_second;

  // Unit definitions:
  unit volume = litre;
  unit substance = 1e-3 mole;
  unit length = metre;
  unit area = metre^2;
  unit time = second;
  unit litre_per_mmole_per_second = litre / (1e-3 mole * second);
  unit per_second = 1 / second;
  unit sq_litre_per_mmole_sq_per_second = litre^2 / ((1e-3 mole)^2 * second);
end
