// SBML level 3 version 1

model echem()
  // model units - substance: substance, time: time, volume: volume, area: area, length: length, extent: substance

  // Compartments:
  compartment kinetics_1213_0_ = 1.666667e-18 volume;

  // Species:
  species Ca_1222_0_ in kinetics_1213_0_ = 8e-5;
  species $Ca_ext_1226_0_ in kinetics_1213_0_ = 8e-5;
  species RR_pool_1230_0_ in kinetics_1213_0_ = 0.0002;
  species $vesicle_pool_1232_0_ in kinetics_1213_0_ = 0.0002;
  species glu_1236_0_ in kinetics_1213_0_ = 0;

  // Reactions:
  // kinetics_1213_0_ * remove_Ca_1224_0__Kf * Ca_1222_0_-kinetics_1213_0_ * remove_Ca_1224_0__Kb * Ca_ext_1226_0_
  remove_Ca_1224_0_: Ca_1222_0_ -> $Ca_ext_1226_0_; kinetics_1213_0_*remove_Ca_1224_0__Kf*Ca_1222_0_ - kinetics_1213_0_*remove_Ca_1224_0__Kb*Ca_ext_1226_0_;
    remove_Ca_1224_0__Kf = 25 per_second; remove_Ca_1224_0__Kb = 25 per_second;
  // kinetics_1213_0_ * vesicle_release_1228_0__Kf * Ca_1222_0_^4*RR_pool_1230_0_
  // High cooperativity, 4 or higher. Several refs: McDargh and O-Shaughnessy, BioRxiv 2021 Voleti, Jaczynska, Rizo, eLife 2020 Chen.... Scheller, Cell 1999
  vesicle_release_1228_0_: 4 Ca_1222_0_ + RR_pool_1230_0_ => glu_1236_0_; kinetics_1213_0_*vesicle_release_1228_0__Kf*Ca_1222_0_^4*RR_pool_1230_0_;
    vesicle_release_1228_0__Kf = 3e13 litre_per_mmole_4_per_second;
  // kinetics_1213_0_ * remove_1234_0__Kf * glu_1236_0_
  remove_1234_0_: glu_1236_0_ => $vesicle_pool_1232_0_; kinetics_1213_0_*remove_1234_0__Kf*glu_1236_0_;
    remove_1234_0__Kf = 200 per_second;
  // kinetics_1213_0_ * replenish_vesicle_1238_0__Kf * vesicle_pool_1232_0_-kinetics_1213_0_ * replenish_vesicle_1238_0__Kb * RR_pool_1230_0_
  replenish_vesicle_1238_0_: $vesicle_pool_1232_0_ -> RR_pool_1230_0_; kinetics_1213_0_*replenish_vesicle_1238_0__Kf*vesicle_pool_1232_0_ - kinetics_1213_0_*replenish_vesicle_1238_0__Kb*RR_pool_1230_0_;
    replenish_vesicle_1238_0__Kf = 0.5 per_second; replenish_vesicle_1238_0__Kb = 0.5 per_second;

  // Unit definitions:
  unit volume = litre;
  unit substance = 1e-3 mole;
  unit length = metre;
  unit area = metre^2;
  unit time = second;
  unit per_second = 1 / second;
  unit litre_per_mmole_4_per_second = litre^4 / ((1e-3 mole)^4 * second);
end
